# LAMMPS Input Script: Gradually lower velocity for atoms closer to the center

# --- Initialization ---
units lj          # Use Lennard-Jones units
atom_style ellipsoid
dimension 3       # 3D simulation
boundary f f p    # set boundary conditions: fixed (non-periodic) in x and y, periodic in z (standard for 2D)

# --- Define the box for the simulation ---
variable box_size equal 200
variable half_box equal ${box_size}/2
region box block 0 ${box_size} 0 ${box_size} -0.5 0.5 units box # Define simulation box boundaries
create_box 1 box                # create the simulation box with 1 atom type
create_atoms 1 random ${molecules} 12345 NULL overlap 3.9 maxtry 50

# --- Define the variables for lj/expand ---
variable	epsilon equal ${var_epsilon}	# energy (strength of attraction between particles)
variable	sigma equal 1.0     # distance where particles bond (potential energy is 0)
variable	delta equal 0.0     # radius difference between particles (for lj/expand)
variable	cutoff equal 2.0	# cutoff distance (particles farther than this value have the interaction ignored)

# --- Define the variables for langevin ---
variable    tstart equal ${var_tstart}
variable    tstop equal ${var_tstop}

# Set ellipsoid as a sphere
set type 1 shape 0.5 0.5 0.5
set atom 1 mass 1.0             # set mass of atom type 1

# --- Other variables ---
variable center_x equal ${half_box}
variable center_y equal ${half_box}
variable vel_scale equal 1      # scaling factor for initial velocity magnitude (adjust if needed)
variable dist atom sqrt((x-${center_x})^2+(y-${center_y})^2)

# --- Interactions ---
pair_style lj/expand 2.5
pair_coeff 1 1 ${epsilon} ${sigma} ${delta} ${cutoff}

# --- Initial Velocities ---
variable vx_init atom v_vel_scale*(${half_box}-x)
variable vy_init atom v_vel_scale*(${half_box}-y)
# Apply the calculated velocities to all atoms, initialize @ zero total linear momentum
velocity all set v_vx_init v_vy_init 0.0 sum yes

# --- Integration ---
fix 1 all nve

# Variables for bins, should be large enough to catch molecules so degrees of freedom > 0
variable        xbins equal 5
variable        ybins equal 5

# This removes the force of molecules moving in a bin
compute         thermal_temp all temp/profile 1 1 1 xy ${xbins} ${ybins}

# --- Modify Fix and Output ---
fix             2 all langevin ${tstart} ${tstop} 0.1 48279
fix_modify      2 temp thermal_temp  # use modified temp

# --- Simulation Settings ---
timestep        0.0001 # timestep for integration (in lj time units)
thermo          100
thermo_style    custom step temp pe ke etotal press vol atoms

# Tell the log output to use the modified temperature
thermo_modify   temp thermal_temp

# --- Output ---
# dump atom positions and velocities every 100 steps to a .lammpstrj file
dump 1 all custom 100 ${filename}.lammpstrj id type x y vx vy fx fy v_dist

# --- Run Simulation ---
run ${steps}
